<Lems>

    <Target component="sim1" />

    <!-- Include core NeuroML2 ComponentType definitions -->
    <Include file="Cells.xml" />
    <Include file="Networks.xml" />
    <Include file="Simulation.xml" />

    <Include file="RateBased.xml" />

    <Include file="NoisyCurrentSource.xml" />

    <rateCell id="E"  Vth="-50mV" Vr="-60mV" Vl="-70mV" Vscale="1mV" gl="6.25nS" tau="28ms" tau_r="2ms"/>
    <rateCell id="I"  Vth="-50mV" Vr="-60mV" Vl="-70mV" Vscale="1mV" gl="10nS"   tau="8ms"  tau_r="2ms"/>

    <!--Dummy synapse which emits no current. Used as presynaptic endpoint for analog synaptic connection.-->
    <silentSynapse id="silent1"/>

    <rateSynapse id="rs" />

    <pulseGenerator id="baselineE" delay="5ms" duration="30ms" amplitude="136.4 pA" />
    <pulseGenerator id="baselineI" delay="5ms" duration="30ms" amplitude="120 pA" />

    <pulseGenerator id="modE" delay="30ms" duration="30ms" amplitude="35 pA" />
    <pulseGenerator id="modI" delay="70ms" duration="30ms" amplitude="35 pA" />

    <sineGenerator id="sg0" phase="0" delay="120ms" duration="50ms" amplitude="0.02nA" period="10ms"/>

    <noisyCurrentSource id="noisyCurrentSource1" delay="220ms" duration="50ms" mean="0.03 nA" stdev="0.01 nA" noiseDt="0.5ms"/>

    <network id="net1">
        <population id="ePop" component="E" size="1" />
        <population id="iPop" component="I" size="1" />

        <continuousProjection id ="e_i" presynapticPopulation="ePop" postsynapticPopulation="iPop">
            <continuousConnectionInstanceW id="0" preCell="../ePop[0]" postCell="../iPop[0]" preComponent="silent1" postComponent="rs" weight="5"/>
        </continuousProjection>

        <continuousProjection id ="i_e" presynapticPopulation="iPop" postsynapticPopulation="ePop">
            <continuousConnectionInstanceW id="0" preCell="../iPop[0]" postCell="../ePop[0]" preComponent="silent1" postComponent="rs" weight="-3"/>
        </continuousProjection>

        <explicitInput target="ePop[0]" input="baselineE" destination="synapses"/>
        <explicitInput target="iPop[0]" input="baselineI" destination="synapses"/>

        <explicitInput target="ePop[0]" input="modE" destination="synapses"/>
        <explicitInput target="iPop[0]" input="modI" destination="synapses"/>

        <explicitInput target="ePop[0]" input="sg0" destination="synapses"/>

        <explicitInput target="ePop[0]" input="noisyCurrentSource1" destination="synapses"/>

    </network>

    <!-- End of NeuroML2 content -->

    <Simulation id="sim1" length="280ms" step="0.01ms" target="net1">

        <Display id="d1" title="Voltages" timeScale="1s" xmin="-20" xmax="220" ymin="-80" ymax="10">
            <Line id="e" quantity="ePop[0]/V" scale="1mV" color="#0000ff" timeScale="1ms" />
            <Line id="pv" quantity="iPop[0]/V" scale="1mV" color="#ff0000" timeScale="1ms" />
        </Display>

        <Display id="d2" title="Rates" timeScale="1s" xmin="-20" xmax="220" ymin="-2" ymax="32">
            <Line id="f e" quantity="ePop[0]/f" scale="1Hz" color="#aaaaff" timeScale="1ms" />
            <Line id="rate e" quantity="ePop[0]/r" scale="1Hz" color="#0000ff" timeScale="1ms" />
            <Line id="f i" quantity="iPop[0]/f" scale="1Hz" color="#ffaaaa" timeScale="1ms" />
            <Line id="rate i" quantity="iPop[0]/r" scale="1Hz" color="#ff0000" timeScale="1ms" />
        </Display>

        <OutputFile id="of1" fileName="rates.dat">
            <OutputColumn id="el" quantity="ePop[0]/r"/>
            <OutputColumn id="il" quantity="iPop[0]/r"/>
        </OutputFile>

    </Simulation>

</Lems>
