<Lems>

    <Target component="sim1" />

    <!-- Include core NeuroML2 ComponentType definitions -->
    <Include file="Cells.xml" />
    <Include file="Networks.xml" />
    <Include file="Simulation.xml" />

    <Include file="RateBased2.xml" />

    <simpleRateUnitDL id="E_dl"  tau="10ms" R0="0"/>
    <simpleRateUnitDL id="I_dl"  tau="5ms" R0="5"/>

    <simpleRateUnit id="E"  tau="10ms" r0="0Hz"/>
    <simpleRateUnit id="I"  tau="5ms" r0="5Hz"/>

    <!--Dummy synapse which emits no current. Used as presynaptic endpoint for analog synaptic connection.-->
    <silentSynapse id="silent1"/>
    <rateSynapse id="rs" />

    <silentSynapseDL id="silent1DL"/>
    <rateSynapseDL id="rsDL" />

    <pulseGeneratorDL id="baselineE_dl" delay="50ms" duration="50ms" amplitude="8" />

    <pulseGenerator id="baselineE" delay="50ms" duration="50ms" amplitude="8nA" />

    <network id="net1">
        <population id="ePopDL" component="E_dl" size="1" />
        <population id="iPopDL" component="I_dl" size="1" />

        <population id="ePop" component="E" size="1" />
        <population id="iPop" component="I" size="1" />

        <continuousProjection id ="e_i" presynapticPopulation="ePop" postsynapticPopulation="iPop">
            <continuousConnectionInstanceW id="0" preCell="../ePop[0]" postCell="../iPop[0]" preComponent="silent1" postComponent="rs" weight=".1"/>
        </continuousProjection>

        <continuousProjection id ="e_i_dl" presynapticPopulation="ePopDL" postsynapticPopulation="iPopDL">
            <continuousConnectionInstanceW id="0" preCell="../ePopDL[0]" postCell="../iPopDL[0]" preComponent="silent1DL" postComponent="rsDL" weight=".1"/>
        </continuousProjection>

        <explicitInput target="ePopDL[0]" input="baselineE_dl" destination="synapses"/>
        <explicitInput target="ePop[0]" input="baselineE" destination="synapses"/>

    </network>

    <!-- End of NeuroML2 content -->

    <Simulation id="sim1" length="200ms" step="0.01ms" target="net1">

        <Display id="d1" title="Inputs" timeScale="1s" xmin="-20" xmax="220" ymin="-1" ymax="11">
            <Line id="isyn e" quantity="ePop[0]/iSyn" scale="1nA" color="#0000ff" timeScale="1ms" />
            <Line id="phi e" quantity="ePop[0]/phi" scale="1" color="#7777ff" timeScale="1ms" />
            <Line id="isyn i" quantity="iPop[0]/iSyn" scale="1nA" color="#ff0000" timeScale="1ms" />
            <Line id="phi i" quantity="iPop[0]/phi" scale="1" color="#ff7777" timeScale="1ms" />
        </Display>

        <Display id="d1DL" title="Inputs DL" timeScale="1s" xmin="-20" xmax="220" ymin="-1" ymax="11">
            <Line id="isyn e DL" quantity="ePopDL[0]/ISyn" scale="1" color="#0000ff" timeScale="1ms" />
            <Line id="phi e DL" quantity="ePopDL[0]/phi" scale="1" color="#7777ff" timeScale="1ms" />
            <Line id="isyn i DL" quantity="iPopDL[0]/ISyn" scale="1" color="#ff0000" timeScale="1ms" />
            <Line id="phi i DL" quantity="iPopDL[0]/phi" scale="1" color="#ff7777" timeScale="1ms" />
        </Display>

        <Display id="d2" title="Rates DL" timeScale="1s" xmin="-20" xmax="220" ymin="-1" ymax="11">
            <Line id="rate e DL" quantity="ePopDL[0]/R" scale="1" color="#0000ff" timeScale="1ms" />
            <Line id="rate i DL" quantity="iPopDL[0]/R" scale="1" color="#ff0000" timeScale="1ms" />
        </Display>

        <Display id="d3" title="Rates" timeScale="1s" xmin="-20" xmax="220" ymin="-1" ymax="11">
            <Line id="rate e" quantity="ePop[0]/r" scale="1Hz" color="#0000ff" timeScale="1ms" />
            <Line id="rate i" quantity="iPop[0]/r" scale="1Hz" color="#ff0000" timeScale="1ms" />
        </Display>

    </Simulation>

</Lems>
