<Lems>

    <!--

        This LEMS file has been automatically generated using PyNeuroML v0.3.19 (libNeuroML v0.2.47)

     -->

    <!-- Specify which component to run -->
    <Target component="Sim0" reportFile="report.Sim0.txt"/>

    <!-- Include core NeuroML2 ComponentType definitions -->
    <Include file="Cells.xml"/>
    <Include file="Networks.xml"/>
    <Include file="Simulation.xml"/>

    <Include file="PyNN.xml"/>

    <Include file="McCPTest.xml"/>

    <sineGeneratorDL id="sg0" phase="0" delay="50ms" duration="800ms" amplitude="1.2" period="100ms"/>

    <network id="ExampleIF">
        <population id="McCPpop" component="mccp0" size="3"/>
        <!--
        <population id="inpop" component="poisson_input" size="1"/>
        <projection id="proj0" presynapticPopulation="McCPpop" postsynapticPopulation="McCPpop" synapse="ampa">
            <connectionWD id="0" preCellId="../inpop[0]" postCellId="../LNPpop[0]" weight="0.01" delay="0ms"/>
        </projection>-->

        <continuousProjection id="proj1" presynapticPopulation="McCPpop" postsynapticPopulation="McCPpop">
            <continuousConnectionInstanceW id="0" preCell="../McCPpop[0]" postCell="../McCPpop[1]" preComponent="silentDL" postComponent="rsDL" weight="0.5"/>
        </continuousProjection>

        <explicitInput target="McCPpop[0]" input="sg0" destination="synapses"/>
    </network>

    <Simulation id="Sim0" length="1000.0ms" step="0.025ms" target="ExampleIF" seed="123">  <!-- Note seed: ensures same random numbers used every run -->

        <Display id="McCPpop0" title="Plots of McCPpop" timeScale="1ms" xmin="-100.0" xmax="1100.0" ymin="-.1" ymax="1.1">
            <Line id="R" quantity="McCPpop[0]/R" scale="1" color="#333333" timeScale="1ms"/>
            <Line id="ISyn" quantity="McCPpop[0]/ISyn" scale="1" color="#ffa799" timeScale="1ms"/>
        </Display>
        <Display id="McCPpop1" title="Plots of McCPpop" timeScale="1ms" xmin="-100.0" xmax="1100.0" ymin="-.1" ymax="1.1">
            <Line id="R" quantity="McCPpop[1]/R" scale="1" color="#333333" timeScale="1ms"/>
            <Line id="ISyn" quantity="McCPpop[1]/ISyn" scale="1" color="#ffa799" timeScale="1ms"/>
        </Display>
        <Display id="McCPpop2" title="Plots of McCPpop" timeScale="1ms" xmin="-100.0" xmax="1100.0" ymin="-.1" ymax="1.1">
            <Line id="R" quantity="McCPpop[2]/R" scale="1" color="#333333" timeScale="1ms"/>
            <Line id="ISyn" quantity="McCPpop[2]/ISyn" scale="1" color="#ffa799" timeScale="1ms"/>
        </Display>

        <!--
        <Display id="d2" title="Plots of LNPpop 2" timeScale="1ms" xmin="-100.0" xmax="1100.0" ymin="-80" ymax="40">
            <Line id="iSyn" quantity="LNPpop[0]/iSyn" scale="1nA" color="#6a2222" timeScale="1ms"/>
            <Line id="L" quantity="LNPpop[0]/L" scale="1" color="#6aa799" timeScale="1ms"/>
            <Line id="N" quantity="LNPpop[0]/N" scale="1" color="#11a900" timeScale="1ms"/>
            <Line id="toss" quantity="LNPpop[0]/toss" scale="1" color="#11ffff" timeScale="1ms"/>
        </Display>-->

    </Simulation>

</Lems>
