<Lems xmlns="http://www.neuroml.org/lems/0.7.4"
      xmlns:xsi="http://www.w3.org/2001/XMLSchema-instance"
      xsi:schemaLocation="http://www.neuroml.org/lems/0.7.4 ../../LEMS/Schemas/LEMS/LEMS_v0.7.4.xsd" >

    <ComponentType  name="rateCell"
                    extends="baseCellMembPot"
                    description="...">

        <Parameter name="Vth" dimension="voltage"/>
        <Parameter name="Vr" dimension="voltage"/>
        <Parameter name="Vl" dimension="voltage"/>
        <Parameter name="Vscale" dimension="voltage"/>

        <Parameter name="gl" dimension="conductance"/>

        <Parameter name="tau" dimension="time"/>
        <Parameter name="tau_r" dimension="time"/>

        <Attachments name="synapses" type="basePointCurrent"/>

        <Exposure name="r" dimension="per_time"/>
        <Exposure name="iSyn" dimension="current"/>
        <Exposure name="V" dimension="voltage"/>
        <Exposure name="f" dimension="per_time"/>

        <Dynamics>

            <StateVariable name="r" dimension="per_time" exposure="r" description="Rate..."/>

            <DerivedVariable name="iSyn" dimension="current" exposure="iSyn" select="synapses[*]/i" reduce="add" />

            <DerivedVariable name="V" dimension="voltage" exposure="V" value="Vl + (iSyn)/gl"/>

            <DerivedVariable name="f" dimension="per_time" exposure="f" value="( (V-Vth)/(tau*(Vth-Vr)) ) * (1/(1-exp(-1*(V-Vth)/Vscale)))"/>

            <TimeDerivative variable="r" value="(-1*r + f)/tau_r"/>

            <!--<OnStart>
                <StateAssignment variable="V" value="Vr"/>
            </OnStart>-->

            <OnCondition test="V .gt. Vth">
                <EventOut port="spike"/>
            </OnCondition>

        </Dynamics>

    </ComponentType>

</Lems>
