<neuroml xmlns="http://www.neuroml.org/schema/neuroml2"  xmlns:xs="http://www.w3.org/2001/XMLSchema" xmlns:xsi="http://www.w3.org/2001/XMLSchema-instance" xsi:schemaLocation="http://www.neuroml.org/schema/neuroml2 https://raw.github.com/NeuroML/NeuroML2/development/Schemas/NeuroML2/NeuroML_v2beta5.xsd" id="PopExample">
    <notes>Generated by NeuroMLlite v0.1.9
    Generated network: PopExample
    Generation seed: 1234
    NeuroMLlite parameters:
        N = 30
        Wei = 0.01
        Wie = 0.01
        fractionE = 0.8
        weightInput = 1</notes>
    <include href="/home/padraig/git/rate/popanalysis/inputs.nml"/>
    <IF_cond_alpha id="iafcell" cm="1." i_offset="0." tau_syn_E="2." tau_syn_I="10." v_init="-65." tau_m="20." tau_refrac="0." v_reset="-65." v_rest="-65." v_thresh="-50." e_rev_E="-10." e_rev_I="-80."/>
    <alphaCondSynapse id="ampaSyn" tau_syn="2." e_rev="-10."/>
    <alphaCondSynapse id="gabaSyn" tau_syn="10." e_rev="-80."/>
    <network id="PopExample">
        <notes>Testing...</notes>
        <property tag="recommended_dt_ms" value="0.025"/>
        <property tag="recommended_duration_ms" value="1000.0"/>
        <population id="Epop" component="iafcell" size="24"/>
        <population id="Ipop" component="iafcell" size="6"/>
        <projection id="projEI" presynapticPopulation="Epop" postsynapticPopulation="Ipop" synapse="ampaSyn">
            <connectionWD id="0" preCellId="../Epop[0]" postCellId="../Ipop[1]" weight="0.01" delay="1ms"/>
            <connectionWD id="1" preCellId="../Epop[0]" postCellId="../Ipop[2]" weight="0.01" delay="1ms"/>
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        </projection>
        <projection id="projIE" presynapticPopulation="Ipop" postsynapticPopulation="Epop" synapse="gabaSyn">
            <connectionWD id="0" preCellId="../Ipop[0]" postCellId="../Epop[1]" weight="0.01" delay="1ms"/>
            <connectionWD id="1" preCellId="../Ipop[0]" postCellId="../Epop[4]" weight="0.01" delay="1ms"/>
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        </projection>
        <inputList id="stim" population="Epop" component="poissonFiringSyn100Hz">
            <input id="0" target="../Epop[0]" destination="synapses"/>
            <input id="1" target="../Epop[1]" destination="synapses"/>
            <input id="2" target="../Epop[2]" destination="synapses"/>
            <input id="3" target="../Epop[3]" destination="synapses"/>
            <input id="4" target="../Epop[4]" destination="synapses"/>
            <input id="5" target="../Epop[5]" destination="synapses"/>
            <input id="6" target="../Epop[6]" destination="synapses"/>
            <input id="7" target="../Epop[7]" destination="synapses"/>
            <input id="8" target="../Epop[8]" destination="synapses"/>
            <input id="9" target="../Epop[9]" destination="synapses"/>
            <input id="10" target="../Epop[10]" destination="synapses"/>
            <input id="11" target="../Epop[11]" destination="synapses"/>
            <input id="12" target="../Epop[12]" destination="synapses"/>
            <input id="13" target="../Epop[13]" destination="synapses"/>
            <input id="14" target="../Epop[14]" destination="synapses"/>
            <input id="15" target="../Epop[15]" destination="synapses"/>
            <input id="16" target="../Epop[16]" destination="synapses"/>
            <input id="17" target="../Epop[17]" destination="synapses"/>
            <input id="18" target="../Epop[18]" destination="synapses"/>
            <input id="19" target="../Epop[19]" destination="synapses"/>
            <input id="20" target="../Epop[20]" destination="synapses"/>
            <input id="21" target="../Epop[21]" destination="synapses"/>
            <input id="22" target="../Epop[22]" destination="synapses"/>
            <input id="23" target="../Epop[23]" destination="synapses"/>
        </inputList>
    </network>
</neuroml>
